Variant := 1
# Коэффицент годового использования
zad := [1.2, 0.8, 200, 4, 5; 1.6, 0.9, 200, 4, 6]
K_r := 300/365
F := zad[Variant, 0] = 1.6
D := zad[Variant, 2] = 200
L_r := zad[Variant, 4] = 6
t_c := 8  # продолжительность смены
v := zad[Variant, 1] = 0.9
L_c := 2  # число смен
Решение
δ := zad[Variant, 3] = 4
Ppn := F*v
Ppn = 1.44
K_c := 1  # коэффицент сменного исполь зования
L_h := 365*L_r*K_r*t_c*L_c*K_c = 28800  # Срок службы(ресурс)
Engine := [2810, 1420, 920, 700; 2850, 1425, 950, 700]
η_оп := 0.96
η_зп := 0.96
η_пк := 0.99
η_м := 0.98
η_пс := 0.98
η := η_оп*η_зп*η_пк*η_пс*η_м = 0.876254
Pdv := Ppn/η
# 4AM71B2Y3
#
# 4AM80A4Y3
#
# 4AM80B6Y3
#
# 4AM90LB8Y3
# 4AM80B2Y3
#
# 4AM90L4Y3
#
# 4AM100L6Y3
#
# 4AM112MA8Y3
Nnom1 := Engine[Variant, 0] = 2850
Pdv = 1.64336
Nnom2 := Engine[Variant, 1] = 1425
Nnom3 := Engine[Variant, 2] = 950
n_рм := 60*1000*v/(π*D) = 85.9437  # Частота вращения барабана
Nnom4 := Engine[Variant, 3] = 700
u3 := Nnom3/n_рм = 11.0538
uzp := 4.5
u1 := Nnom1/n_рм = 33.1613
u4 := Nnom4/n_рм = 8.14487
u2 := Nnom2/n_рм = 16.5806
uop1 := u1/uzp = 7.36917
uop3 := u3/uzp = 2.45639
55.5/4.5 = 12.3333
uop2 := u2/uzp = 3.68458
uop4 := u4/uzp = 1.80997
# u.rem 2....4
# Var 5
# Выбираем при u3= 12.043 uop=2.676
# Var 6 Выбираем при u2=16.6  uzp = 5 uop2=3.3685  Nnom=1425 4AM90L4Y3
# n.ном = 920 | 4AM80B6Y3
n_ном := 1425
# Определение передаточного числа привода и его ступеней:
u := n_ном/n_рм = 16.5806
u_зп := uzp = 4.5
u_оп := u/u_зп = 3.68458
Δn_рм := n_рм*δ/100 = 3.43775
(u - u_зп)/u_зп = 2.68458
u_факт := n_ном/(n_рм + Δn_рм/2) = 16.2555
u_оп := u_факт/u_зп = 3.61234
# Определение силовых и кинематических параметров привода:
n_ном = 1425
ω_ном := π*n_ном/30 = 149.226
Двигатель
Pdv = 1.64336
Быстрох
P_1 := Pdv*η_оп*η_пк = 1.56185
n_1 := n_ном/u_оп = 394.481
ω_1 := ω_ном/u_оп = 41.31
Тихоходн
P_2 := P_1*η_зп*η_пк = 1.48438
n_2 := n_ном/u_зп = 316.667
ω_2 := ω_1/u_зп = 9.18
РМ
P_рм := P_2*η_м*η_пс = 1.4256
n_рм := n_2 = 316.667
ω_рм := ω_2 = 9.18
T_дв := Pdv*10^3/ω_ном = 11.0126
T_1 := T_дв*u_оп*η_оп*η_пк = 37.808
T_2 := T_1*u_зп*η_зп*η_пк = 161.697
T_рм := T_2*η_м*η_пс = 155.294
# Зубчатая цилиндрическая передача, выбор твердости, термообработки  и материала колес.
# 1. Выбираем материал цилиндричесой зубчатой передачи.
# для колеса и шестерни: материал - сталь 40Х, твердость <= 350 НВ, термообработка - улучшение.
# разность средних твердостей HB_1ср-  HB_2с_р= 20...50
# механические характеристики стали 40Х:
HB_1ср := (269 + 302)/2 = 285.5
HB_2ср := (235 + 262)/2 = 248.5
# для шестерни 269....302
Dpred := 125
HB_1ср - HB_2ср = 37
# для колеса  235....262
Spred := 125
# 2. Определение допустимых контактных напряжений для зубьев шестерни и колеса.
# для колеса:
# нагрузка в две смены по 8 часов
N2 := 573*ω_2*L_h = 151492032
151.5*10^6  # циклов
Nh02 := 248.5*16.5/250*10^6 = 16401000
# для шестерни:
N1 := N2*u_зп = 681714144
681.7*10^6  # циклов
Nh01 := 285.5*25/300*10^6 = 23791667
# для улучшенных колес 1<= Khl <= 2.6
K_HL1 := 1
K_HL2 := 1  # тк N1 N2 > Nh01 Nh02
шестерня
σ_Ho1 := 1.8*HB_1ср + 67 = 580.9
колесо
σ_Ho2 := 1.8*HB_2ср + 67 = 514.3
σ_H1 := σ_Ho1*K_HL1 = 580.9
σ_H2 := σ_Ho2*K_HL2 = 514.3
# расчитываем по наименьшему из значений σh=σ_H2=514.2 Н/мм2
# 3. Определение допустимых контактных напряжений изгиба для зубьев шестерни и колеса.
N_F0 := 4*10^6
# для колеса и шестерни Kfl=1 тк N1 N2 > Nf0
K_FL1 := 1
σ_F01 := 1.03*HB_1ср = 294.065
K_FL2 := 1
σ_F02 := 1.03*HB_2ср = 255.955
σ_F1 := K_FL1*σ_F01 = 294.065
σ_F2 := K_FL2*σ_F02 = 255.955
# расчитываем по наименьшему из значений σ_F2
# Расчет закрытой цилиндрической зубчатой передачи
# Проектный расчет
K_a := 43  # для косозубых передач
ψ_a := 0.32
a_w := K_a*(u_оп + 1)*nthroot(T_2*10^3/(0.32*u_оп^2*σ_H2^2), 3) = 104.529
a_w.x := K_a*(u_оп + 1)*nthroot(T_2*10^3/(0.32*4.5^2*σ_H2^2), 3) = 90.2861
d_2 := 2*a_w*u_оп/(u_оп + 1) = 163.732
b_2 := ψ_a*a_w = 33.4493
m := 2*5.8*T_2*10^3/(d_2*b_2*σ_F2) = 1.33806
m := 1.5
β_min := asin(3.5*m/b_2) = 0.157606
β_min*180/π = 9.03013
z_Σ := 2*a_w*cos(β_min)/m = 137.645
z_Σ := 137
β := acos(z_Σ*m/(2*a_w)) = 0.184763
z_1 := z_Σ/(1 + u_оп) = 29.7029
z_2 := z_Σ - z_1 = 107.297
uf := z_2/z_1 = 3.61234
Δu := (uf - u_оп)/u_оп*100 = 2.45874e-14
a_wf := (z_1 + z_2)*m/(2*cos(β)) = 104.529
d_1 := m*z_1/cos(β) = 45.3259
d_2 := m*z_2/cos(β) = 163.732
d_a1 := d_1 + 2*m = 48.3259
d_a2 := d_2 + 2*m = 166.732
d_f1 := d_1 - 2.4*m = 41.7259
ψ_a := 0.32
d_f2 := d_2 - 2.4*m = 160.132
b_2 := ψ_a*a_w = 33.4493
b_1 := b_2 + 3 = 36.4493
# Проверочный расчет
Aw := (d_1 + d_2)/2 = 104.529
Dzag := d_a1 + 6 = 54.3259
Szag := b_2 + 4 = 37.4493
ω_2 = 9.18
d_2 = 163.732
F_t := 2*T_2*10^3/d_2 = 1975.14
v := d_2*ω_2/(2*1000) = 0.751531
β*180/π = 10.5862
σ_Hпровер := 376*sqrt(F_t*(uf + 1)/(d_2*b_2)*1.1*1.01) = 511.145
σ_H2 = 514.3
σ_F2 = 255.955
σF2провер := 0.924*3.62*F_t/(b_2*m)*1*1*1.04 = 136.941
1 - (β*180/π)/140 = 0.924385
z_y1 := z_1/cos(β)^2 = 30.7405
σ_F1 = 294.065
σF1 := σF2провер*3.78/3.62 = 142.994
z_y2 := z_2/cos(β)^2 = 111.045
# Расчет открытой клиноременной передачи
# сечение ремня О
# минимально допустимый диаметр ведущего шкива
d1min := 63
d_рем1 := 100
ε := 0.015
d_рем1min := 40
d_рем2 := u_оп*d_рем1*(1 - ε) = 355.815
d_рем2 := 355
uff := d_рем2/(d_рем1*(1 - ε)) = 3.60406
ΔU := (u_оп - uff)/u_оп*100 = 0.229113
h := 2.35
a := 0.55*(d_рем1 + d_рем2) + h = 252.6
l := 2*a + π/2*(d_рем2 + d_рем1) + (d_рем2 - d_рем1)^2/(4*a) = 1284.27
L := 1400
A := 1/8*(2*L - π*(d_рем2 + d_рем1) + sqrt((2*L - π*(d_рем2 + d_рем1))^2 - 8*(d_рем2 - d_рем1)^2)) = 317.003
α_1 := 180 - 57*(d_рем2 - d_рем1)/A = 134.149
l/L = 0.917334
v := π*d_рем1*n_1/(60*10^3) = 2.0655
U := L/v = 677.802
C_α := 0.89
C_l := 0.96
C_p := 0.9
P_0 := 2.3
C_z := 0.95
P_п := P_0*C_l*C_p*C_α = 1.76861
z := 2.2/P_п = 1.24392
z := 3
F_0 := 850*1.1*C_l/(z*v*C_α*C_p) = 180.844
FT := 1.1*10^3/v = 532.559
F1 := F_0 + FT/(2*z) = 269.604
F2 := F_0 - FT/(2*z) = 92.0841
Fop := 2*F_0*z*sin(α_1/2) = -967.473
# Проверочный расчет:
δ := 2.8
kp := 0.9
b := FT/(δ*kp) = 211.333
AA := δ*b = 591.732
Fo := 2*AA
E_и := 80
ρ := 1300
σ_1 := Fo/AA + FT/(2*z*AA) = 2.15
σ_и := E_и*h/d11  # error: Эта переменная не определена.
σ_v := ρ*v^2*10^-6 = 0.00554618
σ_max := σ_1 + σ_и + σ_v  # error: Эта переменная не определена.
σp := 10
# Нагрузки валов редуктора.
# Консольные силы
# Расчет валлов
# t.k  10...20 Н/мм2  низкие для быстроходных высокие для низкоходных
# Быстроходный вал
T_1 = 37.808
T_2 = 161.697
# Подшипник радиальный шариковый однорядный
#
# Легкая серия 206 d=30 D=62 B=16 r=1.5  Cr=19.5  Cor=10.0
τ_k2 := 20
τ_k1 := 10
r1 := 1.5
t1 := 2.2
t2 := 2.5
r2 := 2.0
d_1в := nthroot(T_1*10^3/(0.2*τ_k1), 3) = 26.639
# Тихоходный вал
l_1в := 1.5*d_1в = 39.9585
# У двигателя размер выходного вала 22 мм.
# Подшипник конический роликовый однорядный
#
# Легкая серия 7208  d=40 D=80 T=20.0 b=20 c=16 r=2.0  r.1=0.8  альфа=14  Cr=42.4  C0r=32.7  e=0.38  Y=1.56 Y0=0.86
d_2в := d_1в + 2*t1 = 31.039
(26 - 22)/22 = 0.181818
l_2в := 1.5*d_2в = 46.5585
# Размер выходного вала у двигателя и у быстроходного вала не отличается больше чем на 20% значит соединение осуществляется стандартной муфтой.
d_3в := d_2в + 3.2*r1 = 35.839
δтолщина := 1.12*nthroot(T_2, 4) = 3.99387
d_f1 = 41.7259
d_a1 = 48.3259
t_1 := 5
hh := 8
d_21в := nthroot(T_2*10^3/(0.2*τ_k2), 3) = 34.32
d_1новый := d_2в - 2.2*(hh - t_1)
l_21в := 1.5*d_2в = 46.5585
24
d_1новый = 24.439
d_22в := d_21в + 2*t2 = 39.32
# Выбор шпонки
#
# диаметр валла шпонки d3 ~ 37 мм
# b шпонки 10 h шпонки 8 фаска 0.4...0.6 глубина паза вала t1 5 глубина паза ступицы t2=3.3 Длина шпонкит 22..110
d_21новый := d_22в - 2.2*(hh - t_1)
d_21новый = 32.72
32
l_22в := 1.5*d_22в = 58.98
d_32в := d_22в + 3.2*r2 = 45.72
# Построение колеса
#
# колеса тихоходного валла
d_ст := 1.55*45 = 69.75
m = 1.5
b_2 = 33.4493
δ_ст := 0.3*45 = 13.5
S := 2.2*m + 0.05*b_2 = 4.97247
l_ст := 1.2*45 = 54
С := 0.5*(S + δ_ст) = 9.23623
0.25*b_2 = 8.36233
b_1/b_2 = 1.08969
Фланцы
# Фундаментальный фланец
δ_f := 1.12*nthroot(T_2, 4) = 3.99387
δ_f := 6
0.5*δ_f = 3  # D1 M14
# M14  винт  M14 болт
# K = 31  K=38
# C = 16  C=17
# D0=24  D0=26
# b0 = 18  b0=-----
# d0 = 16  d0=16
d_01f := 16
Lf := 232
b_1f := 2.4*d_01f + 1.5*δ_f = 47.4
h_1f := 2.35*δ_f = 14.1
h_01f := 2.5*(16 + δ_f) = 55
2.0*16 = 32
